# Configuration
p_Width := 0.12
p_Height := 1
q_Pitch := -0.4
q_Offset := -27*q_Pitch
r_Pitch := 1.4
r_Offset := -33*r_Pitch
s_Pitch := -1.6
s_Offset := -44*s_Pitch
s_ResetPitch := 1.4
s_ResetOffset := -47*s_ResetPitch
t_Width := 0.2
t_Height := 1.5
# __________________________________________________________________________
# Actual Functions
# Total time: 120 ms
P_wave(x) := sin(p_Width*x)*p_Height  # should take ~ 27ms
PQ_Segment(x) := 0
PQ_Time := 16
Q_Wave(x) := x*q_Pitch + q_Offset
R_Wave(x) := x*r_Pitch + r_Offset
S_Wave(x) := x*s_Pitch + s_Offset
S_Reset(x) := x*s_ResetPitch + s_ResetOffset
T_Wave(x) := sin(t_Width*x)*t_Height
# [plot: P_wave(x), PQ_Segment(x), Q_Wave(x), R_Wave(x), S_Wave(x), S_Reset(x), T_Wave(x) vs x]
f(x) := -1.5*x
# [plot: f(x) vs x]
